*Heading
** Job name: CurvedTest4 Model name: CurvedTest4
** Generated by: Abaqus/CAE 2021
*Preprint, echo=NO, model=NO, history=NO, contact=NO
**
** PARTS
**
*Part, name=CurvedTest
*Node
      1, -0.290688843, -0.0186223257,          0.5
      2, -0.281515867, -0.0141256005,          0.5
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*Element, type=C3D8R
    1,  3061,  3062,  3122,  3121,     1,     2,    62,    61
    2,  3062,  3063,  3123,  3122,     2,     3,    63,    62
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*Nset, nset=Set-1, generate
     1,  15300,      1
*Elset, elset=Set-1, generate
     1,  11800,      1
** Section: Matrix
*Solid Section, elset=Set-1, material=Matrix-NeoHooke
,
*End Part
**
*Part, name=Fibers0
*Node
      1,     -0.281133,     -0.500000,     -0.037378
      2,     -0.281133,     -0.487500,     -0.037378
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*Element, type=T3D2
1, 1, 2
2, 2, 3
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*Nset, nset=Fib0, internal, generate
1, 9922, 1
*Elset, elset=Fib0, internal, generate
1, 9681, 1
**Section: TrussSection
*Solid Section, elset=Fib0, material=FIBERS
1.963491E-05,
*End Part
**
*Part, name=Fibers90
*Node
      1,     -0.284540,     -0.498750,     -0.033503
      2,     -0.272684,     -0.498750,     -0.027598
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*Element, type=T3D2
1, 1, 2
2, 2, 3
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*Nset, nset=Fib90, internal, generate
1, 9800, 1
*Elset, elset=Fib90, internal, generate
1, 9601, 1
**Section: TrussSection
*Solid Section, elset=Fib90, material=FIBERS
1.963491E-05,
*End Part
**
**
** ASSEMBLY
**
*Assembly, name=Assembly
**
*Instance, name=CurvedTest-1, part=CurvedTest
          0.,           0.,           0.
          0.,           0.,           0.,           1.,           0.,           0.,          90.
*End Instance
**
*Instance, name=Fibers0, part=Fibers0
0.000000E+00, 0.000000E+00, 0.000000E+00
*End Instance
**
*Instance, name=Fibers90, part=Fibers90
0.000000E+00, 0.000000E+00, 0.000000E+00
*End Instance
*Nset, nset=ALLFIBERS, instance=FIBERS0, generate
1, 9922, 1
*Nset, nset=ALLFIBERS, instance=FIBERS90, generate
1, 9800, 1
*Elset, elset=ALLFIBERS, instance=FIBERS0, generate
1, 9681, 1
*Elset, elset=ALLFIBERS, instance=FIBERS90, generate
1, 9601, 1
**
*Nset, nset=Host, instance=CurvedTest-1, generate
     1,  15300,      1
*Elset, elset=Host, instance=CurvedTest-1, generate
     1,  11800,      1
*Nset, nset=Outside, instance=CurvedTest-1
     1,     2,     3,     4,     5,     6
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*Elset, elset=Outside, instance=CurvedTest-1
     1,     2,     3,     4,     5,     6
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*Nset, nset=SimpleSupport, instance=CurvedTest-1
 12241, 12300, 12301, 12360, 12361, 12420
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*Elset, elset=SimpleSupport, instance=CurvedTest-1
  8851,  8909,  8910,  8968,  8969,  9027
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** Constraint: Embed-1
*Embedded Element, host elset=HOST
ALLFIBERS
*End Assembly
*Amplitude, name=Amp-1
             0.,              0.,           0.001,              1.
**
** MATERIALS
**
*Material, name=FIBERS
*Density
981.,
*Elastic
 1.3e+11, 0.49
*Material, name=Matrix-NeoHooke
*Density
1100.,
*Hyperelastic, neo hooke
 2.1154e+08, 2.182e-09
**
** BOUNDARY CONDITIONS
**
** Name: SimpleSupport Type: Displacement/Rotation
*Boundary
SimpleSupport, 3, 3
** ----------------------------------------------------------------
**
** STEP: Step-1
**
*Step, name=Step-1, nlgeom=YES
*Dynamic, Explicit
, 0.001
*Bulk Viscosity
0.06, 1.2
**
** OUTPUT REQUESTS
**
*Restart, write, number interval=1, time marks=NO
**
** FIELD OUTPUT: F-Output-1
**
*Output, field, variable=PRESELECT
**
** HISTORY OUTPUT: H-Output-1
**
*Output, history, variable=PRESELECT
*End Step
