*Heading
** Job name: Dyneema-3PtBend Model name: Dyneema-3PtBend
** Generated by: Abaqus/CAE 2021
*Preprint, echo=NO, model=NO, history=NO, contact=NO
**
** PARTS
**
*Part, name=BeamSlice
*Node
      1, 0.0500000007, 0.00499999989, 0.00039999999
      2, 0.0500000007, 0.00400000019, 0.00039999999
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*Element, type=C3D8R
   1,   23,   24,   35,   34,    1,    2,   13,   12
   2,   24,   25,   36,   35,    2,    3,   14,   13
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*Nset, nset=Set-1, generate
    1,  2222,     1
*Elset, elset=Set-1, generate
    1,  1000,     1
*Elset, elset=_Front_S3, internal, generate
    1,  1000,     1
*Surface, type=ELEMENT, name=Front
_Front_S3, S3
*Elset, elset=_Back_S5, internal, generate
    1,  1000,     1
*Surface, type=ELEMENT, name=Back
_Back_S5, S5
** Section: Beam
*Solid Section, elset=Set-1, material=DYNEEMA_CHOCRON
,
*End Part
**
*Part, name=Fibers0
*Node
      1,     -0.049900,     -0.005000,      0.000100
      2,     -0.049900,     -0.003750,      0.000100
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*Element, type=T3D2
1, 1, 2
2, 2, 3
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*Nset, nset=Fib0, internal, generate
1, 11250, 1
*Elset, elset=Fib0, internal, generate
1, 10001, 1
**Section: TrussSection
*Solid Section, elset=Fib0, material=Fibers
1.257470E-07,
*End Part
**
*Part, name=Fibers90
*Node
      1,     -0.050000,     -0.004900,      0.000500
      2,     -0.048750,     -0.004900,      0.000500
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*Element, type=T3D2
1, 1, 2
2, 2, 3
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*Nset, nset=Fib90, internal, generate
1, 10125, 1
*Elset, elset=Fib90, internal, generate
1, 10001, 1
**Section: TrussSection
*Solid Section, elset=Fib90, material=Fibers
1.257470E-07,
*End Part
**
**
**
** ASSEMBLY
**
*Assembly, name=Assembly
**
*Instance, name=BeamSlice-1, part=BeamSlice
*End Instance
**
*Instance, name=Fibers0, part=Fibers0
0.000000E+00, 0.000000E+00, 0.000000E+00
*End Instance
**
*Instance, name=Fibers90, part=Fibers90
0.000000E+00, 0.000000E+00, 0.000000E+00
*End Instance
*Nset, nset=ALLFIBERS, instance=FIBERS0, generate
1, 11250, 1
*Nset, nset=ALLFIBERS, instance=FIBERS90, generate
1, 10125, 1
*Elset, elset=ALLFIBERS, instance=FIBERS0, generate
1, 10001, 1
*Elset, elset=ALLFIBERS, instance=FIBERS90, generate
1, 10001, 1
**
*Instance, name=BeamSlice-2, part=BeamSlice
          0.,           0.,       0.0004
*End Instance
**
*Instance, name=BeamSlice-3, part=BeamSlice
          0.,           0.,       0.0008
*End Instance
**
*Instance, name=BeamSlice-4, part=BeamSlice
          0.,           0.,       0.0012
*End Instance
**
*Instance, name=BeamSlice-5, part=BeamSlice
          0.,           0.,       0.0016
*End Instance
**
*Instance, name=BeamSlice-6, part=BeamSlice
          0.,           0.,        0.002
*End Instance
**
*Instance, name=BeamSlice-7, part=BeamSlice
          0.,           0.,       0.0024
*End Instance
**
*Instance, name=BeamSlice-8, part=BeamSlice
          0.,           0.,       0.0028
*End Instance
**
*Instance, name=BeamSlice-9, part=BeamSlice
          0.,           0.,       0.0032
*End Instance
**
*Instance, name=BeamSlice-10, part=BeamSlice
          0.,           0.,       0.0036
*End Instance
**
*Nset, nset=Host, instance=BeamSlice-1, generate
    1,  2222,     1
*Nset, nset=Host, instance=BeamSlice-2, generate
    1,  2222,     1
*Nset, nset=Host, instance=BeamSlice-4, generate
    1,  2222,     1
*Nset, nset=Host, instance=BeamSlice-8, generate
    1,  2222,     1
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*Elset, elset=Host, instance=BeamSlice-1, generate
    1,  1000,     1
*Elset, elset=Host, instance=BeamSlice-2, generate
    1,  1000,     1
*Elset, elset=Host, instance=BeamSlice-4, generate
    1,  1000,     1
*Elset, elset=Host, instance=BeamSlice-8, generate
    1,  1000,     1
*Elset, elset=Host, instance=BeamSlice-6, generate
    1,  1000,     1
*Elset, elset=Host, instance=BeamSlice-10, generate
    1,  1000,     1
*Elset, elset=Host, instance=BeamSlice-3, generate
    1,  1000,     1
*Elset, elset=Host, instance=BeamSlice-5, generate
    1,  1000,     1
*Elset, elset=Host, instance=BeamSlice-9, generate
    1,  1000,     1
*Elset, elset=Host, instance=BeamSlice-7, generate
    1,  1000,     1
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*Nset, nset=RP1
 1,
*Nset, nset=SupportRPs
 2, 3
*Nset, nset=_PickedSet267, internal
 1,
*Nset, nset=_PickedSet269, internal
 2,
*Nset, nset=_PickedSet271, internal
 3,
** Constraint: Pin
*Rigid Body, ref node=_PickedSet267, analytical surface=Pin-1.Surf-1
** Constraint: Sup1
*Rigid Body, ref node=_PickedSet269, analytical surface=Support-1.Surf-2
** Constraint: Sup2
*Rigid Body, ref node=_PickedSet271, analytical surface=Support-2.Surf-3
** Constraint: Embed-1
*Embedded Element, host elset=HOST
ALLFIBERS
*End Assembly
**
** MATERIALS
**
*Material, name=DYNEEMA_CHOCRON
*Damage Initiation, criterion=DUCTILE
 0.1, 0.333333,     0.01
*Damage Evolution, type=ENERGY, softening=EXPONENTIAL
1460.,
*Density
980.,
*Elastic
 7e+08, 0.45
*Plastic
 7e+07,0.
*Material, name=FIBERS
*Density
981.,
*Elastic
 2e+08, 0.3
*Material, name=FIBERS_CHOCRON
*Damage Initiation, criterion=DUCTILE
 0.035,   0., 0.01
*Damage Evolution, type=ENERGY
1.,
*Density
981.,
*Elastic
 1.35e+11, 0.45
*Plastic
 3.8e+09,0.
*Rate Dependent
1., 0.08
*Material, name=FIBERS_FAIL
*Damage Initiation, criterion=DUCTILE
 0.03,   0., 0.01
*Damage Evolution, type=ENERGY
1.,
*Density
981.,
*Elastic
 2e+08, 0.3
*Plastic
 2.5e+09,0.
*Rate Dependent
1., 0.08
**  Properties from Matweb: AISI Type M50 Tool Steel
*Material, name=M50_TOOLSTEEL
*Damage Initiation, criterion=DUCTILE
 0.198, 0.33333,  0.0002
*Damage Evolution, type=ENERGY, softening=EXPONENTIAL
210000.,
*Density
7970.,
*Elastic
 2.034e+11, 0.3
*Plastic
 1.894e+09,0.
*Material, name=MATRIX_UTOMO
*Density
308.,
*Elastic, type=ENGINEERING CONSTANTS
 4.04e+10,  4.04e+10, 4.271e+09,      0.02,      0.06,      0.06,     9e+08,     4e+08
     4e+08,
**
** INTERACTION PROPERTIES
**
*Surface Interaction, name=Hazzard_Dyneema
*Cohesive Behavior
 6e+10, 3e+10, 3e+10
*Damage Initiation, criterion=MAXS
 1.2e+06, 1.8e+06, 1.8e+06
*Damage Evolution, type=ENERGY, mixed mode behavior=POWER LAW, power=2.
544.,1088.,1088.
*Surface Interaction, name=INTPROP-1
*Friction
 0.42,
**
** BOUNDARY CONDITIONS
**
** Name: Supports Type: Displacement/Rotation
*Boundary
SupportRPs, 1, 1
SupportRPs, 2, 2
SupportRPs, 3, 3
SupportRPs, 4, 4
SupportRPs, 5, 5
SupportRPs, 6, 6
** ----------------------------------------------------------------
**
** STEP: Step-1
**
*Step, name=Step-1, nlgeom=YES
*Dynamic, Explicit
, 0.1
*Bulk Viscosity
0.06, 1.2
**
** BOUNDARY CONDITIONS
**
** Name: AppliedVel Type: Velocity/Angular velocity
*Boundary, type=VELOCITY
RP1, 1, 1
RP1, 2, 2
RP1, 3, 3, -0.000283333
RP1, 4, 4
RP1, 5, 5
RP1, 6, 6
**
** INTERACTIONS
**
** Interaction: general_contact
*Contact, op=NEW
*Contact Inclusions, ALL EXTERIOR
*Contact Property Assignment
 ,  , INTPROP-1
BeamSlice-1.Front , BeamSlice-2.Back , Hazzard_Dyneema
BeamSlice-2.Front , BeamSlice-3.Back , Hazzard_Dyneema
BeamSlice-3.Front , BeamSlice-4.Back , Hazzard_Dyneema
BeamSlice-4.Front , BeamSlice-5.Back , Hazzard_Dyneema
BeamSlice-5.Front , BeamSlice-6.Back , Hazzard_Dyneema
BeamSlice-6.Front , BeamSlice-7.Back , Hazzard_Dyneema
BeamSlice-7.Front , BeamSlice-8.Back , Hazzard_Dyneema
BeamSlice-8.Front , BeamSlice-9.Back , Hazzard_Dyneema
BeamSlice-9.Front , BeamSlice-10.Back , Hazzard_Dyneema
**
** OUTPUT REQUESTS
**
*Restart, write, number interval=1, time marks=NO
**
** FIELD OUTPUT: F-Output-1
**
*Output, field, number interval=200
*Node Output
A, U, V
**
** FIELD OUTPUT: F-Output-2
**
*Element Output, directions=YES
CFAILURE, DMICRT, ER, LE, MISES, PE, PEEQ, S, SDEG, SEQUT, STATUS
**
** FIELD OUTPUT: F-Output-3
**
*Contact Output
CSTATUS, CSTRESS
**
** HISTORY OUTPUT: H-Output-1
**
*Output, history, variable=PRESELECT
*End Step
