*Heading
** Job name: DyneemaPlate-Plastic Model name: DyneemaPlate-Plastic
** Generated by: Abaqus/CAE 2021
*Preprint, echo=NO, model=NO, history=NO, contact=NO
**
** PARTS
**
*Part, name=SteelProjectile
*Node
      1, 0.00260637561, -0.00301579502, 0.00260637561
      2,           0., 0.00476250006,           0.
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*Element, type=C3D8R
  1,  139,  121,  122,  140,  894,  876,  877,  895
  2,  121,  139,   48,   49,  876,  894,  447,  448
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*Element, type=C3D6
 949,   23,  258, 1013,    3,   24,  536
 950,   22,  259, 1014,   23,  258, 1013
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*Nset, nset=All, generate
    1,  2425,     1
*Elset, elset=All, generate
    1,  2172,     1
*Nset, nset=Set-4, generate
    1,  2425,     1
*Elset, elset=Set-4, generate
    1,  2172,     1
*Nset, nset=XSymm
   2,   3,   5,   6,   7,   8
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*Elset, elset=XSymm
 1877, 1878, 1879, 1880, 1881, 1882
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*Nset, nset=YSymm
   2,   3,   4,   6,   7,   8
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*Elset, elset=YSymm
  791,  792,  793,  794,  795,  796
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** Region: (Projectile:Set-4), (Controls:EC-2)
*Elset, elset=_I1, internal
    1,    2,    3,    4,    5,    6
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** Section: Projectile
*Solid Section, elset=_I1, controls=EC-2, material=M50_ToolSteel
,
** Region: (Projectile:Set-4), (Controls:Default)
*Elset, elset=_I2, internal
  949,  950,  951,  952,  953,  954
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** Section: Projectile
*Solid Section, elset=_I2, material=M50_ToolSteel
,
*End Part
**
*Part, name=Fibers0
*Node
      1,     -0.101175,      0.000000,      0.000425
      2,     -0.101175,      0.002674,      0.000425
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*Element, type=T3D2
1, 1, 2
2, 2, 3
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*Nset, nset=Fib0, internal, generate
1, 3808, 1
*Elset, elset=Fib0, internal, generate
1, 3689, 1
**Section: TrussSection
*Solid Section, elset=Fib0, material=DyneemaFibers
2.269801E-06,
*End Part
**
*Part, name=Fibers90
*Node
      1,     -0.096253,      0.000425,      0.002125
      2,     -0.093785,      0.000425,      0.002125
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*Element, type=T3D2
1, 1, 2
2, 2, 3
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*Nset, nset=Fib90, internal, generate
1, 3826, 1
*Elset, elset=Fib90, internal, generate
1, 3707, 1
**Section: TrussSection
*Solid Section, elset=Fib90, material=DyneemaFibers
2.269801E-06,
*End Part
**
*Part, name=TargetPlate
*Node
      1, -0.0888999999,           0.,           0.
      2,           0., 0.0888999999,           0.
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*Element, type=C3D8R
   1,  200, 1552, 3089, 1342,    1,   17,  376,  104
   2, 1552, 1553, 3090, 3089,   17,   18,  377,  376
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*Nset, nset=_PickedSet103, internal, generate
    1,  7833,     1
*Elset, elset=_PickedSet103, internal, generate
    1,  6336,     1
*Nset, nset=XSymm
    2,    3,    6,    7,   11,   12
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*Elset, elset=XSymm
   24,   48,   72,   96,  120,  144
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*Nset, nset=YSymm
    1,    4,    8,   10,   11,   12
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*Elset, elset=YSymm
    1,   25,   49,   73,   97,  121
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*Elset, elset=_FrontFace_S1, internal
 2641, 2642, 2643, 2644, 2645, 2646
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*Elset, elset=_FrontFace_S3, internal
 4537, 4538, 4539, 4540, 4541, 4542
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*Elset, elset=_FrontFace_S4, internal, generate
 5007,  5472,     3
*Surface, type=ELEMENT, name=FrontFace
_FrontFace_S1, S1
_FrontFace_S3, S3
_FrontFace_S4, S4
*Elset, elset=_BackFace_S2, internal
    1,    2,    3,    4,    5,    6
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*Surface, type=ELEMENT, name=BackFace
_BackFace_S2, S2
*Orientation, name=Ori-1
1., 0., 0., 0., 1., 0.
1, 0.
** Section: Matrix
*Solid Section, elset=_PickedSet103, orientation=Ori-1, controls=EC-1, material=Matrix_Utomo
,
*End Part
**
**
** ASSEMBLY
**
*Assembly, name=Assembly
**
*Instance, name=TargetPlate-1, part=TargetPlate
*End Instance
**
*Instance, name=Fibers0, part=Fibers0
0.000000E+00, 0.000000E+00, 0.000000E+00
*End Instance
**
*Instance, name=Fibers90, part=Fibers90
0.000000E+00, 0.000000E+00, 0.000000E+00
*End Instance
*Nset, nset=ALLFIBERS, instance=FIBERS0, generate
1, 3808, 1
*Nset, nset=ALLFIBERS, instance=FIBERS90, generate
1, 3826, 1
*Elset, elset=ALLFIBERS, instance=FIBERS0, generate
1, 3689, 1
*Elset, elset=ALLFIBERS, instance=FIBERS90, generate
1, 3707, 1
**
*Instance, name=SteelProjectile-1, part=SteelProjectile
          0.,           0.,     0.011213
          0.,           0.,     0.011213, -0.577350279552042, -0.577350279552042, 0.588563279552042, 119.999999109416
*End Instance
**
*Nset, nset=AllOutside, instance=TargetPlate-1
    1,    2,    3,    4,    5,    6
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*Elset, elset=AllOutside, instance=TargetPlate-1
    1,    2,    3,    4,    5,    6
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*Nset, nset=Clamp, instance=TargetPlate-1
    1,    2,    5,    6,   10,   13
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*Elset, elset=Clamp, instance=TargetPlate-1
 5905, 5906, 5907, 5908, 5909, 5910
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*Nset, nset=HOST, instance=TargetPlate-1, generate
    1,  7833,     1
*Elset, elset=HOST, instance=TargetPlate-1, generate
    1,  6336,     1
*Nset, nset=Outside, instance=TargetPlate-1
    1,    2,    3,    4,   11,   13
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*Elset, elset=Outside, instance=TargetPlate-1
    1,    2,    3,    4,    5,    6
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*Nset, nset=XSymm, instance=TargetPlate-1
    2,    3,    6,    7,   11,   12
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*Nset, nset=XSymm, instance=SteelProjectile-1
   2,   3,   5,   6,   7,   8
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*Nset, nset=YSymm, instance=TargetPlate-1
    1,    4,    8,   10,   11,   12
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*Nset, nset=YSymm, instance=SteelProjectile-1
   2,   3,   4,   6,   7,   8
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*Elset, elset=_ALLCONT_S1, internal, instance=TargetPlate-1, generate
    1,  6336,     1
*Elset, elset=_ALLCONT_S1, internal, instance=SteelProjectile-1, generate
    1,  2172,     1
*Elset, elset=_ALLCONT_S2, internal, instance=TargetPlate-1, generate
    1,  6336,     1
*Elset, elset=_ALLCONT_S2, internal, instance=SteelProjectile-1, generate
    1,  2172,     1
*Elset, elset=_ALLCONT_S3, internal, instance=TargetPlate-1, generate
    1,  6336,     1
*Elset, elset=_ALLCONT_S3, internal, instance=SteelProjectile-1, generate
    1,  2172,     1
*Elset, elset=_ALLCONT_S4, internal, instance=TargetPlate-1, generate
    1,  6336,     1
*Elset, elset=_ALLCONT_S4, internal, instance=SteelProjectile-1, generate
    1,  2172,     1
*Elset, elset=_ALLCONT_S5, internal, instance=TargetPlate-1, generate
    1,  6336,     1
*Elset, elset=_ALLCONT_S5, internal, instance=SteelProjectile-1, generate
    1,  2172,     1
*Elset, elset=_ALLCONT_S6, internal, instance=TargetPlate-1, generate
    1,  6336,     1
*Elset, elset=_ALLCONT_S6, internal, instance=SteelProjectile-1
    1,    2,    3,    4,    5,    6
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*Surface, type=ELEMENT, name=ALLCONT
_ALLCONT_S1, S1
_ALLCONT_S2, S2
_ALLCONT_S4, S4
_ALLCONT_S6, S6
_ALLCONT_S3, S3
_ALLCONT_S5, S5
** Constraint: Embed-1
*Embedded Element, host elset=HOST
ALLFIBERS
*End Assembly
**
** ELEMENT CONTROLS
**
*Section Controls, name=EC-1, ELEMENT DELETION=YES, MAX DEGRADATION=0.05
1., 1., 1.
*Section Controls, name=EC-2, ELEMENT DELETION=YES
1., 1., 1.
**
** MATERIALS
**
*Material, name=Dyneema_Hazzard
*Damage Initiation, criterion=HASHIN
 1.25e+09, 1.25e+09, 1.25e+09, 1.25e+09,  1.8e+06,  1.8e+06
*Density
970.,
*Elastic, type=ENGINEERING CONSTANTS
 3.4257e+10, 3.4257e+10,   3.26e+09,      0.001,      0.013,      0.013,  1.738e+08,  5.478e+08
  5.478e+08,
*Material, name=Dyneema_Hazzard-Elastic
*Density
970.,
*Elastic, type=ENGINEERING CONSTANTS
 3.4257e+10, 3.4257e+10,   3.26e+09,      0.001,      0.013,      0.013,  1.738e+08,  5.478e+08
  5.478e+08,
*Material, name=FIBERS_Fail
*Damage Initiation, criterion=DUCTILE
 0.03,   0., 0.01
*Damage Evolution, type=ENERGY
1.,
*Density
981.,
*Elastic
 2e+08, 0.49
*Plastic
 2.5e+09,0.
*Rate Dependent
1., 0.08
*Material, name=Fibers
*Density
981.,
*Elastic
 1.3e+11, 0.49
** Properties from Matweb: AISI Type M50 Tool Steel
*Material, name=M50_ToolSteel
*Damage Initiation, criterion=DUCTILE
 0.198, 0.33333,  0.0002
*Damage Evolution, type=ENERGY
201000.,
*Density
7970.,
*Elastic
 2.034e+11, 0.3
*Plastic
 1.894e+09,0.
*Material, name=Matrix_Utomo
*Density
308.,
*Elastic, type=ENGINEERING CONSTANTS
 4.04e+10,  4.04e+10, 4.271e+09,      0.02,      0.06,      0.06,     9e+08,     4e+08
     4e+08,
*Material, name=Matrix_Utomo-Damage
*Damage Initiation, criterion=DUCTILE
 0.00028096, 0.333333,    0.001
*Density
308.,
*Elastic, type=ENGINEERING CONSTANTS
 4.04e+10,  4.04e+10, 4.271e+09,      0.02,      0.06,      0.06,     9e+08,     4e+08
     4e+08,
*Plastic
 1.2e+06,0.
**
** INTERACTION PROPERTIES
**
*Surface Interaction, name=IntProp-1
*Friction
 0.42,
**
** BOUNDARY CONDITIONS
**
** Name: Clamp Type: Symmetry/Antisymmetry/Encastre
*Boundary
Clamp, ENCASTRE
** Name: SymmX Type: Symmetry/Antisymmetry/Encastre
*Boundary
XSymm, XSYMM
** Name: Symmy Type: Symmetry/Antisymmetry/Encastre
*Boundary
YSymm, YSYMM
**
** PREDEFINED FIELDS
**
** Name: ProjectileVel   Type: Velocity
*Initial Conditions, type=VELOCITY
SteelProjectile-1.All, 1, 0.
SteelProjectile-1.All, 2, 0.
SteelProjectile-1.All, 3, -800.
** ----------------------------------------------------------------
**
** STEP: Step-1
**
*Step, name=Step-1, nlgeom=YES
*Dynamic, Explicit
, 0.00015
*Bulk Viscosity
0.06, 1.2
**
** INTERACTIONS
**
** Interaction: GeneralContact
*Contact, op=NEW
*Contact Inclusions
ALLCONT ,
*Contact Property Assignment
 ,  , IntProp-1
**
** OUTPUT REQUESTS
**
*Restart, write, number interval=1, time marks=NO
**
** FIELD OUTPUT: F-Output-1
**
*Output, field, number interval=200
*Node Output
A, U, V
*Element Output, directions=YES
CFAILURE, DMICRT, ER, LE, MISES, PE, PEEQ, S, SDEG, SEQUT, STATUS
*Contact Output
CDISP, CFORCE, CSTATUS, CSTRESS
**
** HISTORY OUTPUT: H-Output-1
**
*Output, history, variable=PRESELECT
*End Step
