*Heading
** Job name: Dyneema-CohesiveH-Thin-m2 Model name: DiskQuarter-Cohesive-3layer
** Generated by: Abaqus/CAE 2021
*Preprint, echo=NO, model=NO, history=NO, contact=NO
**
** PARTS
**
*Part, name=SteelProjectile
*Node
      1, 0.00260637561, -0.00301579502, 0.00260637561
      2,           0., 0.00476250006,           0.
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*Element, type=C3D8R
  1,  139,  121,  122,  140,  894,  876,  877,  895
  2,  121,  139,   48,   49,  876,  894,  447,  448
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*Element, type=C3D6
 949,   23,  258, 1013,    3,   24,  536
 950,   22,  259, 1014,   23,  258, 1013
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*Nset, nset=All, generate
    1,  2425,     1
*Elset, elset=All, generate
    1,  2172,     1
*Nset, nset=Set-4, generate
    1,  2425,     1
*Elset, elset=Set-4, generate
    1,  2172,     1
*Nset, nset=XSymm
   2,   3,   5,   6,   7,   8
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*Elset, elset=XSymm
 1877, 1878, 1879, 1880, 1881, 1882
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*Nset, nset=YSymm
   2,   3,   4,   6,   7,   8
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*Elset, elset=YSymm
  791,  792,  793,  794,  795,  796
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** Region: (Projectile:Set-4), (Controls:EC-2)
*Elset, elset=_I1, internal
    1,    2,    3,    4,    5,    6
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** Section: Projectile
*Solid Section, elset=_I1, controls=EC-2, material=M50_ToolSteel
,
** Region: (Projectile:Set-4), (Controls:Default)
*Elset, elset=_I2, internal
  949,  950,  951,  952,  953,  954
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** Section: Projectile
*Solid Section, elset=_I2, material=M50_ToolSteel
,
*End Part
**
*Part, name=TargetPlate
*Node
      1, -0.0888999999,           0.,           0.
      2,           0., 0.0888999999,           0.
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*Element, type=C3D8R
   1,  192, 1324, 1993, 1282,    1,   17,  316,  104
   2, 1324, 1325, 1994, 1993,   17,   18,  317,  316
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*Nset, nset=_PickedSet103, internal, generate
    1,  2757,     1
*Elset, elset=_PickedSet103, internal, generate
    1,  1728,     1
*Nset, nset=XSymm
    2,    3,    6,    7,   11,   12
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*Elset, elset=XSymm
   24,   48,   72,   96,  120,  144
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*Nset, nset=YSymm
    1,    4,    8,   10,   11,   12
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*Elset, elset=YSymm
    1,   25,   49,   73,   97,  121
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*Elset, elset=_FrontFace_S1, internal
  529,  530,  531,  532,  533,  534
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*Elset, elset=_FrontFace_S3, internal
 1321, 1322, 1323, 1324, 1325, 1326
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*Elset, elset=_FrontFace_S4, internal, generate
 1381,  1440,     1
*Surface, type=ELEMENT, name=FrontFace
_FrontFace_S1, S1
_FrontFace_S3, S3
_FrontFace_S4, S4
*Elset, elset=_BackFace_S2, internal
    1,    2,    3,    4,    5,    6
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*Surface, type=ELEMENT, name=BackFace
_BackFace_S2, S2
*Orientation, name=Ori-1
1., 0., 0., 0., 1., 0.
1, 0.
** Section: Matrix
*Solid Section, elset=_PickedSet103, orientation=Ori-1, controls=EC-1, material=DyneemaMatrix_Utomo
,
*End Part
**
**
** ASSEMBLY
**
*Assembly, name=Assembly
**
*Instance, name=TargetPlate-1, part=TargetPlate
*End Instance
**
*Instance, name=SteelProjectile-1, part=SteelProjectile
          0.,           0.,     0.009963
          0.,           0.,     0.009963, -0.577350279552042, -0.577350279552042, 0.587313279552042, 119.999999109416
*End Instance
**
*Instance, name=TargetPlate-2, part=TargetPlate
          0.,           0.,       0.0017
*End Instance
**
*Instance, name=TargetPlate-3, part=TargetPlate
          0.,           0.,       0.0034
*End Instance
**
*Nset, nset=AllOutside, instance=TargetPlate-1
    1,    2,    3,    4,    6,    7
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*Nset, nset=AllOutside, instance=TargetPlate-2
    1,    2,    3,    4,    6,    7
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*Nset, nset=AllOutside, instance=TargetPlate-3
    1,    2,    3,    4,    5,    6
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*Elset, elset=AllOutside, instance=TargetPlate-1
    1,    2,    3,    4,    5,    6
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*Elset, elset=AllOutside, instance=TargetPlate-2
    1,   24,   25,   48,   49,   72
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*Elset, elset=AllOutside, instance=TargetPlate-3
    1,   24,   25,   48,   49,   72
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*Nset, nset=Clamp, instance=TargetPlate-1
    1,    2,   13,   14,   17,   18
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*Nset, nset=Clamp, instance=TargetPlate-3
    5,    6,   10,   15,   16,  105
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*Elset, elset=Clamp, instance=TargetPlate-1, generate
 1585,  1656,     1
*Elset, elset=Clamp, instance=TargetPlate-3, generate
 1657,  1728,     1
*Nset, nset=HOST, instance=TargetPlate-1, generate
    1,  2757,     1
*Nset, nset=HOST, instance=TargetPlate-2, generate
    1,  2757,     1
*Nset, nset=HOST, instance=TargetPlate-3, generate
    1,  2757,     1
*Elset, elset=HOST, instance=TargetPlate-1, generate
    1,  1728,     1
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*Nset, nset=XSymm, instance=TargetPlate-1
    2,    3,    6,    7,   11,   12
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*Nset, nset=XSymm, instance=SteelProjectile-1
   2,   3,   5,   6,   7,   8
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*Nset, nset=XSymm, instance=TargetPlate-2
    2,    3,    6,    7,   11,   12
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*Nset, nset=XSymm, instance=TargetPlate-3
    2,    3,    6,    7,   11,   12
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*Nset, nset=YSymm, instance=TargetPlate-1
    1,    4,    8,   10,   11,   12
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*Nset, nset=YSymm, instance=SteelProjectile-1
   2,   3,   4,   6,   7,   8
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*Nset, nset=YSymm, instance=TargetPlate-2
    1,    4,    8,   10,   11,   12
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*Nset, nset=YSymm, instance=TargetPlate-3
    1,    4,    8,   10,   11,   12
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*Elset, elset=_ALLCONT_S1, internal, instance=TargetPlate-1, generate
    1,  1728,     1
*Elset, elset=_ALLCONT_S1, internal, instance=SteelProjectile-1, generate
    1,  2172,     1
*Elset, elset=_ALLCONT_S1, internal, instance=TargetPlate-2, generate
    1,  1728,     1
*Elset, elset=_ALLCONT_S1, internal, instance=TargetPlate-3, generate
    1,  1728,     1
*Elset, elset=_ALLCONT_S2, internal, instance=TargetPlate-1, generate
    1,  1728,     1
*Elset, elset=_ALLCONT_S2, internal, instance=SteelProjectile-1, generate
    1,  2172,     1
*Elset, elset=_ALLCONT_S2, internal, instance=TargetPlate-2, generate
    1,  1728,     1
*Elset, elset=_ALLCONT_S2, internal, instance=TargetPlate-3, generate
    1,  1728,     1
*Elset, elset=_ALLCONT_S3, internal, instance=TargetPlate-1, generate
    1,  1728,     1
*Elset, elset=_ALLCONT_S3, internal, instance=SteelProjectile-1, generate
    1,  2172,     1
*Elset, elset=_ALLCONT_S3, internal, instance=TargetPlate-2, generate
    1,  1728,     1
*Elset, elset=_ALLCONT_S3, internal, instance=TargetPlate-3, generate
    1,  1728,     1
*Elset, elset=_ALLCONT_S4, internal, instance=TargetPlate-1, generate
    1,  1728,     1
*Elset, elset=_ALLCONT_S4, internal, instance=SteelProjectile-1, generate
    1,  2172,     1
*Elset, elset=_ALLCONT_S4, internal, instance=TargetPlate-2, generate
    1,  1728,     1
*Elset, elset=_ALLCONT_S4, internal, instance=TargetPlate-3, generate
    1,  1728,     1
*Elset, elset=_ALLCONT_S5, internal, instance=TargetPlate-1, generate
    1,  1728,     1
*Elset, elset=_ALLCONT_S5, internal, instance=SteelProjectile-1, generate
    1,  2172,     1
*Elset, elset=_ALLCONT_S5, internal, instance=TargetPlate-2, generate
    1,  1728,     1
*Elset, elset=_ALLCONT_S5, internal, instance=TargetPlate-3, generate
    1,  1728,     1
*Elset, elset=_ALLCONT_S6, internal, instance=TargetPlate-1, generate
    1,  1728,     1
*Elset, elset=_ALLCONT_S6, internal, instance=SteelProjectile-1
    1,    2,    3,    4,    5,    6
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*Elset, elset=_ALLCONT_S6, internal, instance=TargetPlate-2, generate
    1,  1728,     1
*Elset, elset=_ALLCONT_S6, internal, instance=TargetPlate-3, generate
    1,  1728,     1
*Surface, type=ELEMENT, name=ALLCONT
_ALLCONT_S1, S1
_ALLCONT_S2, S2
_ALLCONT_S4, S4
_ALLCONT_S6, S6
_ALLCONT_S3, S3
_ALLCONT_S5, S5
*End Assembly
**
** ELEMENT CONTROLS
**
*Section Controls, name=EC-1, ELEMENT DELETION=YES, MAX DEGRADATION=0.05
1., 1., 1.
*Section Controls, name=EC-2, ELEMENT DELETION=YES
1., 1., 1.
**
** MATERIALS
**
*Material, name=DyneemaMatrix_Utomo
*Density
308.,
*Elastic, type=ENGINEERING CONSTANTS
 4.04e+10,  4.04e+10, 4.271e+09,      0.02,      0.06,       0.5,     9e+08,     4e+08
     4e+08,
*Material, name=Dyneema_Hazzard_idk
*Density
970.,
*Elastic, type=ENGINEERING CONSTANTS
 3.4257e+10, 3.4257e+10,   3.26e+09,      0.001,      0.013,      0.013,  1.738e+08,  5.478e+08
  5.478e+08,
*Material, name=Dyneema_Lassig-Elastic
*Density
1100.,
*Elastic, type=ENGINEERING CONSTANTS
 2.69e+10, 2.69e+10, 3.62e+09,      0.1,      0.1,      0.5, 4.23e+07, 3.07e+07
 3.07e+07,
*Material, name=Dyneema_Lassig-Plastic
*Damage Initiation, criterion=DUCTILE
1., 0.333333,    0.001
*Damage Evolution, type=ENERGY, softening=EXPONENTIAL
790.,
*Density
1100.,
*Elastic, type=ENGINEERING CONSTANTS
 2.69e+10, 2.69e+10, 3.62e+09,      0.1,      0.1,      0.5, 4.23e+07, 3.07e+07
 3.07e+07,
*Plastic
  170000.,       0.
  176000., 0.000182
  989000.,   0.0012
 1.74e+06,  0.00311
 2.42e+06,  0.00692
  3.1e+06,   0.0113
 5.97e+06,   0.0283
  1.2e+07,   0.0578
 2.07e+07,    0.106
*Potential
 1e-05, 1e-05,  0.03, 1e-06, 1e-06, 1e-06
*Material, name=FIBERS_Fail
*Damage Initiation, criterion=DUCTILE
 0.03,   0., 0.01
*Damage Evolution, type=ENERGY
1.,
*Density
981.,
*Elastic
 2e+08, 0.3
*Plastic
 2.5e+09,0.
*Rate Dependent
1., 0.08
*Material, name=Fibers
*Density
981.,
*Elastic
 2e+08, 0.3
*Material, name=HardSteel
*Density
8000.,
*Elastic
 4e+11, 0.3
** Properties from Matweb: AISI Type M50 Tool Steel
*Material, name=M50_ToolSteel
*Damage Initiation, criterion=DUCTILE
 0.198, 0.33333,  0.0002
*Damage Evolution, type=ENERGY
201000.,
*Density
7970.,
*Elastic
 2.034e+11, 0.3
*Plastic
 1.894e+09,0.
*Material, name=Matrix
*Density
308.,
*Elastic, type=ORTHOTROPIC
 4.2e+10, 2.4e+09, 4.2e+10, 2.7e+09, 2.7e+09, 4.6e+09,   4e+08,   4e+08
   9e+08,
*Material, name=Polyurethane
*Density
980.,
*Elastic
 5.0776e+06,0.
*Plastic
     611343.,        0.
     663262., 0.0101742
     708155., 0.0198202
     753051., 0.0302479
     797940., 0.0419179
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 4.65812e+06,   5.06485
**
** INTERACTION PROPERTIES
**
*Surface Interaction, name=Hazzard_Dyneema
*Cohesive Behavior
 3.26e+09, 5.478e+08, 5.478e+08
*Damage Initiation, criterion=QUADS
 1.2e+06, 1.8e+06, 1.8e+06
*Damage Evolution, type=ENERGY, softening=EXPONENTIAL, mixed mode behavior=POWER LAW, power=2.
544.,1088.,1088.
*Surface Interaction, name=IntProp-1
*Friction
 0.42,
*Surface Interaction, name=Lassig_Dyneema
*Cohesive Behavior, eligibility=CURRENT CONTACTS
 3.62e+09, 3.07e+07, 3.07e+07
*Damage Initiation, criterion=QUADS
 1.07e+06, 1.01e+26, 1.01e+26
*Damage Evolution, type=ENERGY, mixed mode behavior=BK, power=2.5
790., 1.46, 1.46
*Damage Stabilization
0.002
**
** BOUNDARY CONDITIONS
**
** Name: Clamp Type: Symmetry/Antisymmetry/Encastre
*Boundary
Clamp, ENCASTRE
** Name: SymmX Type: Symmetry/Antisymmetry/Encastre
*Boundary
XSymm, XSYMM
** Name: Symmy Type: Symmetry/Antisymmetry/Encastre
*Boundary
YSymm, YSYMM
**
** PREDEFINED FIELDS
**
** Name: ProjectileVel   Type: Velocity
*Initial Conditions, type=VELOCITY
SteelProjectile-1.All, 1, 0.
SteelProjectile-1.All, 2, 0.
SteelProjectile-1.All, 3, -800.
** ----------------------------------------------------------------
**
** STEP: Step-1
**
*Step, name=Step-1, nlgeom=YES
*Dynamic, Explicit
, 0.00015
*Bulk Viscosity
0.06, 1.2
**
** INTERACTIONS
**
** Interaction: GeneralContact
*Contact, op=NEW
*Contact Inclusions
ALLCONT ,
*Contact Property Assignment
 ,  , IntProp-1
TargetPlate-1.FrontFace , TargetPlate-2.BackFace , Hazzard_Dyneema
TargetPlate-2.FrontFace , TargetPlate-3.BackFace , Hazzard_Dyneema
**
** OUTPUT REQUESTS
**
*Restart, write, number interval=1, time marks=NO
**
** FIELD OUTPUT: F-Output-1
**
*Output, field, number interval=200
*Node Output
A, U, V
*Element Output, directions=YES
CFAILURE, DMICRT, ER, LE, MISES, PE, PEEQ, S, SDEG, SEQUT, STATUS
*Contact Output
CDISP, CFORCE, CSTATUS, CSTRESS
**
** HISTORY OUTPUT: H-Output-1
**
*Output, history, variable=PRESELECT
*End Step
