*Heading
** Job name: DyneemaCohesive-Shot8 Model name: DiskQuarter-Cohesive-Shot8
** Generated by: Abaqus/CAE 2021
*Preprint, echo=NO, model=NO, history=NO, contact=NO
**
** PARTS
**
*Part, name=SteelProjectile
*Node
      1, 0.00260637561, -0.00301579502, 0.00260637561
      2,           0., 0.00476250006,           0.
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*Element, type=C3D8R
  1,  139,  121,  122,  140,  894,  876,  877,  895
  2,  121,  139,   48,   49,  876,  894,  447,  448
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*Element, type=C3D6
 949,   23,  258, 1013,    3,   24,  536
 950,   22,  259, 1014,   23,  258, 1013
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*Nset, nset=All, generate
    1,  2425,     1
*Elset, elset=All, generate
    1,  2172,     1
*Nset, nset=Set-4, generate
    1,  2425,     1
*Elset, elset=Set-4, generate
    1,  2172,     1
*Nset, nset=XSymm
   2,   3,   5,   6,   7,   8
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*Elset, elset=XSymm
 1877, 1878, 1879, 1880, 1881, 1882
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*Nset, nset=YSymm
   2,   3,   4,   6,   7,   8
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*Elset, elset=YSymm
  791,  792,  793,  794,  795,  796
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** Region: (Projectile:Set-4), (Controls:EC-2)
*Elset, elset=_I1, internal
    1,    2,    3,    4,    5,    6
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** Section: Projectile
*Solid Section, elset=_I1, controls=EC-2, material=M50_ToolSteel
,
** Region: (Projectile:Set-4), (Controls:Default)
*Elset, elset=_I2, internal
  949,  950,  951,  952,  953,  954
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** Section: Projectile
*Solid Section, elset=_I2, material=M50_ToolSteel
,
*End Part
**
*Part, name=TargetPlate
*Node
      1, -0.0603250004,           0.,           0.
      2,           0., 0.0603250004,           0.
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*Element, type=C3D8R
   1,  214, 1667, 4053, 1591,    1,   17,  451,  114
   2, 1667, 1668, 4054, 4053,   17,   18,  452,  451
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*Nset, nset=_PickedSet103, internal, generate
    1,  7232,     1
*Elset, elset=_PickedSet103, internal, generate
    1,  5184,     1
*Nset, nset=XSymm
    2,    3,    6,    7,   11,   12
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*Elset, elset=XSymm
   31,   62,   93,  124,  155,  186
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*Nset, nset=YSymm
    1,    4,    8,   10,   11,   12
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*Elset, elset=YSymm
    1,   32,   63,   94,  125,  156
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*Elset, elset=_Front_S1, internal
 1241, 1242, 1243, 1244, 1245, 1246
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*Elset, elset=_Front_S3, internal
 2876, 2877, 2878, 2879, 2880, 2881
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*Elset, elset=_Front_S4, internal, generate
 3627,  4425,     2
*Surface, type=ELEMENT, name=Front
_Front_S1, S1
_Front_S3, S3
_Front_S4, S4
*Elset, elset=_Back_S2, internal
    1,    2,    3,    4,    5,    6
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*Surface, type=ELEMENT, name=Back
_Back_S2, S2
*Orientation, name=Ori-1
1., 0., 0., 0., 1., 0.
1, 0.
** Section: Matrix
*Solid Section, elset=_PickedSet103, orientation=Ori-1, controls=EC-1, material=Dyneema_Chocron
,
*End Part
**
**
** ASSEMBLY
**
*Assembly, name=Assembly
**
*Instance, name=TargetPlate-1, part=TargetPlate
*End Instance
**
*Instance, name=SteelProjectile-1, part=SteelProjectile
          0.,           0.,     0.031533
          0.,           0.,     0.031533, -0.577350279552042, -0.577350279552042, 0.608883279552042, 119.999999109416
*End Instance
**
*Instance, name=TargetPlate-2, part=TargetPlate
          0.,           0.,      0.00127
*End Instance
**
*Instance, name=TargetPlate-3, part=TargetPlate
          0.,           0.,      0.00254
*End Instance
**
*Instance, name=TargetPlate-4, part=TargetPlate
          0.,           0.,      0.00381
*End Instance
**
*Instance, name=TargetPlate-5, part=TargetPlate
          0.,           0.,      0.00508
*End Instance
**
*Instance, name=TargetPlate-6, part=TargetPlate
          0.,           0.,      0.00635
*End Instance
**
*Instance, name=TargetPlate-7, part=TargetPlate
          0.,           0.,      0.00762
*End Instance
**
*Instance, name=TargetPlate-8, part=TargetPlate
          0.,           0.,      0.00889
*End Instance
**
*Instance, name=TargetPlate-9, part=TargetPlate
          0.,           0.,      0.01016
*End Instance
**
*Instance, name=TargetPlate-10, part=TargetPlate
          0.,           0.,      0.01143
*End Instance
**
*Instance, name=TargetPlate-11, part=TargetPlate
          0.,           0.,       0.0127
*End Instance
**
*Instance, name=TargetPlate-12, part=TargetPlate
          0.,           0.,      0.01397
*End Instance
**
*Instance, name=TargetPlate-13, part=TargetPlate
          0.,           0.,      0.01524
*End Instance
**
*Instance, name=TargetPlate-14, part=TargetPlate
          0.,           0.,      0.01651
*End Instance
**
*Instance, name=TargetPlate-15, part=TargetPlate
          0.,           0.,      0.01778
*End Instance
**
*Instance, name=TargetPlate-16, part=TargetPlate
          0.,           0.,      0.01905
*End Instance
**
*Instance, name=TargetPlate-17, part=TargetPlate
          0.,           0.,      0.02032
*End Instance
**
*Instance, name=TargetPlate-18, part=TargetPlate
          0.,           0.,      0.02159
*End Instance
**
*Instance, name=TargetPlate-19, part=TargetPlate
          0.,           0.,      0.02286
*End Instance
**
*Instance, name=TargetPlate-20, part=TargetPlate
          0.,           0.,      0.02413
*End Instance
**
*Nset, nset=AllOutside, instance=TargetPlate-1
    1,    2,    3,    4,    6,    7
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*Nset, nset=AllOutside, instance=TargetPlate-2
    1,    2,    3,    4,    6,    7
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*Nset, nset=AllOutside, instance=TargetPlate-4
    1,    2,    3,    4,    6,    7
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*Nset, nset=AllOutside, instance=TargetPlate-8
    1,    2,    3,    4,    6,    7
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*Nset, nset=AllOutside, instance=TargetPlate-16
    1,    2,    3,    4,    6,    7
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*Nset, nset=AllOutside, instance=TargetPlate-12
    1,    2,    3,    4,    6,    7
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*Elset, elset=AllOutside, instance=TargetPlate-1
    1,    2,    3,    4,    5,    6
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*Elset, elset=AllOutside, instance=TargetPlate-2
    1,   31,   32,   62,   63,   93
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*Elset, elset=AllOutside, instance=TargetPlate-4
    1,   31,   32,   62,   63,   93
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*Elset, elset=AllOutside, instance=TargetPlate-8
    1,   31,   32,   62,   63,   93
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*Elset, elset=AllOutside, instance=TargetPlate-16
    1,   31,   32,   62,   63,   93
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*Elset, elset=AllOutside, instance=TargetPlate-12
    1,   31,   32,   62,   63,   93
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*Nset, nset=Clamp, instance=TargetPlate-1
    1,    2,   13,   14,   17,   18
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*Nset, nset=SymmX, instance=TargetPlate-1
    2,    3,    6,    7,   11,   12
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*Nset, nset=SymmX, instance=SteelProjectile-1
   2,   3,   5,   6,   7,   8
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*Nset, nset=SymmX, instance=TargetPlate-2
    2,    3,    6,    7,   11,   12
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*Nset, nset=SymmX, instance=TargetPlate-4
    2,    3,    6,    7,   11,   12
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*Nset, nset=SymmX, instance=TargetPlate-8
    2,    3,    6,    7,   11,   12
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*Nset, nset=SymmX, instance=TargetPlate-16
    2,    3,    6,    7,   11,   12
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*Nset, nset=SymmX, instance=TargetPlate-12
    2,    3,    6,    7,   11,   12
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*Nset, nset=SymmX, instance=TargetPlate-20
    2,    3,    6,    7,   11,   12
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*Nset, nset=SymmX, instance=TargetPlate-6
    2,    3,    6,    7,   11,   12
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*Nset, nset=SymmX, instance=TargetPlate-10
    2,    3,    6,    7,   11,   12
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*Nset, nset=SymmX, instance=TargetPlate-18
    2,    3,    6,    7,   11,   12
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*Nset, nset=SymmX, instance=TargetPlate-14
    2,    3,    6,    7,   11,   12
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*Nset, nset=SymmX, instance=TargetPlate-3
    2,    3,    6,    7,   11,   12
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*Nset, nset=SymmX, instance=TargetPlate-5
    2,    3,    6,    7,   11,   12
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*Nset, nset=SymmX, instance=TargetPlate-9
    2,    3,    6,    7,   11,   12
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*Nset, nset=SymmX, instance=TargetPlate-17
    2,    3,    6,    7,   11,   12
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*Nset, nset=SymmX, instance=TargetPlate-13
    2,    3,    6,    7,   11,   12
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*Nset, nset=SymmX, instance=TargetPlate-7
    2,    3,    6,    7,   11,   12
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*Nset, nset=SymmX, instance=TargetPlate-11
    2,    3,    6,    7,   11,   12
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*Nset, nset=SymmX, instance=TargetPlate-19
    2,    3,    6,    7,   11,   12
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*Nset, nset=SymmX, instance=TargetPlate-15
    2,    3,    6,    7,   11,   12
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*Nset, nset=SymmY, instance=TargetPlate-1
    1,    4,    8,   10,   11,   12
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*Nset, nset=SymmY, instance=SteelProjectile-1
   2,   3,   4,   6,   7,   8
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*Nset, nset=SymmY, instance=TargetPlate-2
    1,    4,    8,   10,   11,   12
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*Nset, nset=SymmY, instance=TargetPlate-4
    1,    4,    8,   10,   11,   12
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*Nset, nset=SymmY, instance=TargetPlate-8
    1,    4,    8,   10,   11,   12
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*Nset, nset=SymmY, instance=TargetPlate-16
    1,    4,    8,   10,   11,   12
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*Nset, nset=SymmY, instance=TargetPlate-12
    1,    4,    8,   10,   11,   12
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*Nset, nset=SymmY, instance=TargetPlate-20
    1,    4,    8,   10,   11,   12
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*Nset, nset=SymmY, instance=TargetPlate-6
    1,    4,    8,   10,   11,   12
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*Nset, nset=SymmY, instance=TargetPlate-10
    1,    4,    8,   10,   11,   12
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*Nset, nset=SymmY, instance=TargetPlate-18
    1,    4,    8,   10,   11,   12
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*Nset, nset=SymmY, instance=TargetPlate-14
    1,    4,    8,   10,   11,   12
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*Nset, nset=SymmY, instance=TargetPlate-3
    1,    4,    8,   10,   11,   12
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*Nset, nset=SymmY, instance=TargetPlate-5
    1,    4,    8,   10,   11,   12
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*Nset, nset=SymmY, instance=TargetPlate-9
    1,    4,    8,   10,   11,   12
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*Nset, nset=SymmY, instance=TargetPlate-17
    1,    4,    8,   10,   11,   12
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*Nset, nset=SymmY, instance=TargetPlate-13
    1,    4,    8,   10,   11,   12
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*Nset, nset=SymmY, instance=TargetPlate-7
    1,    4,    8,   10,   11,   12
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*Nset, nset=SymmY, instance=TargetPlate-11
    1,    4,    8,   10,   11,   12
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*Nset, nset=SymmY, instance=TargetPlate-19
    1,    4,    8,   10,   11,   12
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*Nset, nset=SymmY, instance=TargetPlate-15
    1,    4,    8,   10,   11,   12
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*Elset, elset=_ALLCONT_S1, internal, instance=TargetPlate-1
  359,  360,  389,  390,  391,  392
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*Elset, elset=_ALLCONT_S1, internal, instance=SteelProjectile-1, generate
    1,  2172,     1
*Elset, elset=_ALLCONT_S1, internal, instance=TargetPlate-2
  359,  360,  389,  390,  391,  392
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*Elset, elset=_ALLCONT_S1, internal, instance=TargetPlate-4
  359,  360,  389,  390,  391,  392
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*Elset, elset=_ALLCONT_S1, internal, instance=TargetPlate-8
  359,  360,  389,  390,  391,  392
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*Elset, elset=_ALLCONT_S1, internal, instance=TargetPlate-16
  328,  329,  358,  359,  360,  361
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*Elset, elset=_ALLCONT_S1, internal, instance=TargetPlate-12
  328,  358,  359,  360,  361,  388
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*Elset, elset=_ALLCONT_S1, internal, instance=TargetPlate-20
  328,  329,  358,  359,  360,  361
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*Elset, elset=_ALLCONT_S1, internal, instance=TargetPlate-6
  359,  360,  389,  390,  391,  392
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*Elset, elset=_ALLCONT_S1, internal, instance=TargetPlate-10
  358,  359,  360,  361,  388,  389
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*Elset, elset=_ALLCONT_S1, internal, instance=TargetPlate-18
  328,  329,  358,  359,  360,  361
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*Elset, elset=_ALLCONT_S1, internal, instance=TargetPlate-14
  328,  358,  359,  360,  361,  388
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*Elset, elset=_ALLCONT_S1, internal, instance=TargetPlate-3
  359,  360,  389,  390,  391,  392
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*Elset, elset=_ALLCONT_S1, internal, instance=TargetPlate-5
  359,  360,  389,  390,  391,  392
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*Elset, elset=_ALLCONT_S1, internal, instance=TargetPlate-9
  358,  359,  360,  361,  389,  390
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*Elset, elset=_ALLCONT_S1, internal, instance=TargetPlate-17
  328,  329,  358,  359,  360,  361
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*Elset, elset=_ALLCONT_S1, internal, instance=TargetPlate-13
  328,  358,  359,  360,  361,  388
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*Elset, elset=_ALLCONT_S1, internal, instance=TargetPlate-7
  359,  360,  389,  390,  391,  392
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*Elset, elset=_ALLCONT_S1, internal, instance=TargetPlate-11
  328,  358,  359,  360,  361,  388
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*Elset, elset=_ALLCONT_S1, internal, instance=TargetPlate-19
  328,  329,  358,  359,  360,  361
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*Elset, elset=_ALLCONT_S1, internal, instance=TargetPlate-15
  328,  358,  359,  360,  361,  388
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*Elset, elset=_ALLCONT_S2, internal, instance=TargetPlate-1
  359,  360,  390,  391,  392,  420
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*Elset, elset=_ALLCONT_S2, internal, instance=SteelProjectile-1, generate
    1,  2172,     1
*Elset, elset=_ALLCONT_S2, internal, instance=TargetPlate-2
  359,  360,  390,  391,  392,  420
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*Elset, elset=_ALLCONT_S2, internal, instance=TargetPlate-4
  359,  360,  389,  390,  391,  392
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*Elset, elset=_ALLCONT_S2, internal, instance=TargetPlate-8
  359,  360,  389,  390,  391,  392
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*Elset, elset=_ALLCONT_S2, internal, instance=TargetPlate-16
  359,  360,  361,  389,  390,  391
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*Elset, elset=_ALLCONT_S2, internal, instance=TargetPlate-12
  359,  360,  389,  390,  391,  392
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*Elset, elset=_ALLCONT_S2, internal, instance=TargetPlate-20
  328,  359,  360,  361,  389,  390
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*Elset, elset=_ALLCONT_S2, internal, instance=TargetPlate-6
  359,  360,  389,  390,  391,  392
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*Elset, elset=_ALLCONT_S2, internal, instance=TargetPlate-10
  359,  360,  389,  390,  391,  392
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*Elset, elset=_ALLCONT_S2, internal, instance=TargetPlate-18
  359,  360,  361,  389,  390,  391
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*Elset, elset=_ALLCONT_S2, internal, instance=TargetPlate-14
  359,  360,  389,  390,  391,  392
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*Elset, elset=_ALLCONT_S2, internal, instance=TargetPlate-3
  359,  360,  390,  391,  392,  420
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*Elset, elset=_ALLCONT_S2, internal, instance=TargetPlate-5
  359,  360,  389,  390,  391,  392
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*Elset, elset=_ALLCONT_S2, internal, instance=TargetPlate-9
  359,  360,  389,  390,  391,  392
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*Elset, elset=_ALLCONT_S2, internal, instance=TargetPlate-17
  359,  360,  361,  389,  390,  391
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*Elset, elset=_ALLCONT_S2, internal, instance=TargetPlate-13
  359,  360,  389,  390,  391,  392
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*Elset, elset=_ALLCONT_S2, internal, instance=TargetPlate-7
  359,  360,  389,  390,  391,  392
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*Elset, elset=_ALLCONT_S2, internal, instance=TargetPlate-11
  359,  360,  389,  390,  391,  392
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*Elset, elset=_ALLCONT_S2, internal, instance=TargetPlate-19
  359,  360,  361,  389,  390,  391
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*Elset, elset=_ALLCONT_S2, internal, instance=TargetPlate-15
  359,  360,  361,  389,  390,  391
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*Elset, elset=_ALLCONT_S3, internal, instance=TargetPlate-1
  390,  391,  420,  421,  422,  423
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*Elset, elset=_ALLCONT_S3, internal, instance=SteelProjectile-1, generate
    1,  2172,     1
*Elset, elset=_ALLCONT_S3, internal, instance=TargetPlate-2
  390,  391,  420,  421,  422,  423
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*Elset, elset=_ALLCONT_S3, internal, instance=TargetPlate-4
  390,  391,  420,  421,  422,  423
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*Elset, elset=_ALLCONT_S3, internal, instance=TargetPlate-8
  390,  391,  420,  421,  422,  423
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*Elset, elset=_ALLCONT_S3, internal, instance=TargetPlate-16
  359,  360,  389,  390,  391,  392
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*Elset, elset=_ALLCONT_S3, internal, instance=TargetPlate-12
  359,  389,  390,  391,  392,  419
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*Elset, elset=_ALLCONT_S3, internal, instance=TargetPlate-20
  359,  360,  389,  390,  391,  392
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*Elset, elset=_ALLCONT_S3, internal, instance=TargetPlate-6
  390,  391,  420,  421,  422,  423
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*Elset, elset=_ALLCONT_S3, internal, instance=TargetPlate-10
  389,  390,  391,  392,  419,  420
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*Elset, elset=_ALLCONT_S3, internal, instance=TargetPlate-18
  359,  360,  389,  390,  391,  392
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*Elset, elset=_ALLCONT_S3, internal, instance=TargetPlate-14
  359,  389,  390,  391,  392,  419
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*Elset, elset=_ALLCONT_S3, internal, instance=TargetPlate-3
  390,  391,  420,  421,  422,  423
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*Elset, elset=_ALLCONT_S3, internal, instance=TargetPlate-5
  390,  391,  420,  421,  422,  423
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*Elset, elset=_ALLCONT_S3, internal, instance=TargetPlate-9
  389,  390,  391,  392,  420,  421
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*Elset, elset=_ALLCONT_S3, internal, instance=TargetPlate-17
  359,  360,  389,  390,  391,  392
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*Elset, elset=_ALLCONT_S3, internal, instance=TargetPlate-13
  359,  389,  390,  391,  392,  419
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*Elset, elset=_ALLCONT_S3, internal, instance=TargetPlate-7
  390,  391,  420,  421,  422,  423
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*Elset, elset=_ALLCONT_S3, internal, instance=TargetPlate-11
  359,  389,  390,  391,  392,  419
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*Elset, elset=_ALLCONT_S3, internal, instance=TargetPlate-19
  359,  360,  389,  390,  391,  392
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*Elset, elset=_ALLCONT_S3, internal, instance=TargetPlate-15
  359,  389,  390,  391,  392,  419
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*Elset, elset=_ALLCONT_S4, internal, instance=TargetPlate-1
  359,  389,  390,  391,  419,  420
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*Elset, elset=_ALLCONT_S4, internal, instance=SteelProjectile-1, generate
    1,  2172,     1
*Elset, elset=_ALLCONT_S4, internal, instance=TargetPlate-2
  359,  389,  390,  391,  392,  419
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*Elset, elset=_ALLCONT_S4, internal, instance=TargetPlate-4
  359,  389,  390,  391,  392,  419
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*Elset, elset=_ALLCONT_S4, internal, instance=TargetPlate-8
  359,  389,  390,  391,  392,  419
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*Elset, elset=_ALLCONT_S4, internal, instance=TargetPlate-16
  328,  358,  359,  360,  388,  389
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*Elset, elset=_ALLCONT_S4, internal, instance=TargetPlate-12
  358,  359,  360,  388,  389,  390
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*Elset, elset=_ALLCONT_S4, internal, instance=TargetPlate-20
  328,  358,  359,  360,  388,  389
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*Elset, elset=_ALLCONT_S4, internal, instance=TargetPlate-6
  359,  389,  390,  391,  392,  419
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*Elset, elset=_ALLCONT_S4, internal, instance=TargetPlate-10
  358,  359,  360,  388,  389,  390
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*Elset, elset=_ALLCONT_S4, internal, instance=TargetPlate-18
  328,  358,  359,  360,  388,  389
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*Elset, elset=_ALLCONT_S4, internal, instance=TargetPlate-14
  358,  359,  360,  388,  389,  390
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*Elset, elset=_ALLCONT_S4, internal, instance=TargetPlate-3
  359,  389,  390,  391,  392,  419
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*Elset, elset=_ALLCONT_S4, internal, instance=TargetPlate-5
  359,  389,  390,  391,  392,  419
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*Elset, elset=_ALLCONT_S4, internal, instance=TargetPlate-9
  358,  359,  360,  389,  390,  391
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*Elset, elset=_ALLCONT_S4, internal, instance=TargetPlate-17
  328,  358,  359,  360,  388,  389
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*Elset, elset=_ALLCONT_S4, internal, instance=TargetPlate-13
  358,  359,  360,  388,  389,  390
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*Elset, elset=_ALLCONT_S4, internal, instance=TargetPlate-7
  359,  389,  390,  391,  392,  419
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*Elset, elset=_ALLCONT_S4, internal, instance=TargetPlate-11
  358,  359,  360,  388,  389,  390
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*Elset, elset=_ALLCONT_S4, internal, instance=TargetPlate-19
  328,  358,  359,  360,  388,  389
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*Elset, elset=_ALLCONT_S4, internal, instance=TargetPlate-15
  358,  359,  360,  388,  389,  390
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*Elset, elset=_ALLCONT_S5, internal, instance=TargetPlate-1
  359,  360,  389,  390,  391,  392
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*Elset, elset=_ALLCONT_S5, internal, instance=SteelProjectile-1, generate
    1,  2172,     1
*Elset, elset=_ALLCONT_S5, internal, instance=TargetPlate-2
  359,  360,  389,  390,  391,  392
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*Elset, elset=_ALLCONT_S5, internal, instance=TargetPlate-4
  359,  360,  389,  390,  391,  392
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*Elset, elset=_ALLCONT_S5, internal, instance=TargetPlate-8
  359,  360,  389,  390,  391,  392
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*Elset, elset=_ALLCONT_S5, internal, instance=TargetPlate-16
  328,  329,  358,  359,  360,  361
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*Elset, elset=_ALLCONT_S5, internal, instance=TargetPlate-12
  328,  358,  359,  360,  361,  388
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*Elset, elset=_ALLCONT_S5, internal, instance=TargetPlate-20
  328,  329,  358,  359,  360,  361
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*Elset, elset=_ALLCONT_S5, internal, instance=TargetPlate-6
  359,  360,  389,  390,  391,  392
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*Elset, elset=_ALLCONT_S5, internal, instance=TargetPlate-10
  358,  359,  360,  361,  388,  389
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*Elset, elset=_ALLCONT_S5, internal, instance=TargetPlate-18
  328,  329,  358,  359,  360,  361
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*Elset, elset=_ALLCONT_S5, internal, instance=TargetPlate-14
  328,  358,  359,  360,  361,  388
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*Elset, elset=_ALLCONT_S5, internal, instance=TargetPlate-3
  359,  360,  389,  390,  391,  392
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*Elset, elset=_ALLCONT_S5, internal, instance=TargetPlate-5
  359,  360,  389,  390,  391,  392
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*Elset, elset=_ALLCONT_S5, internal, instance=TargetPlate-9
  358,  359,  360,  361,  389,  390
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*Elset, elset=_ALLCONT_S5, internal, instance=TargetPlate-17
  328,  329,  358,  359,  360,  361
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*Elset, elset=_ALLCONT_S5, internal, instance=TargetPlate-13
  328,  358,  359,  360,  361,  388
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*Elset, elset=_ALLCONT_S5, internal, instance=TargetPlate-7
  359,  360,  389,  390,  391,  392
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*Elset, elset=_ALLCONT_S5, internal, instance=TargetPlate-11
  328,  358,  359,  360,  361,  388
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*Elset, elset=_ALLCONT_S5, internal, instance=TargetPlate-19
  328,  329,  358,  359,  360,  361
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*Elset, elset=_ALLCONT_S5, internal, instance=TargetPlate-15
  328,  358,  359,  360,  361,  388
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*Elset, elset=_ALLCONT_S6, internal, instance=TargetPlate-1
  360,  390,  391,  392,  420,  421
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*Elset, elset=_ALLCONT_S6, internal, instance=SteelProjectile-1
    1,    2,    3,    4,    5,    6
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*Elset, elset=_ALLCONT_S6, internal, instance=TargetPlate-2
  360,  390,  391,  392,  393,  420
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*Elset, elset=_ALLCONT_S6, internal, instance=TargetPlate-4
  360,  390,  391,  392,  393,  420
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*Elset, elset=_ALLCONT_S6, internal, instance=TargetPlate-8
  360,  390,  391,  392,  393,  420
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*Elset, elset=_ALLCONT_S6, internal, instance=TargetPlate-16
  329,  359,  360,  361,  389,  390
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*Elset, elset=_ALLCONT_S6, internal, instance=TargetPlate-12
  359,  360,  361,  389,  390,  391
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*Elset, elset=_ALLCONT_S6, internal, instance=TargetPlate-20
  329,  359,  360,  361,  389,  390
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*Elset, elset=_ALLCONT_S6, internal, instance=TargetPlate-6
  360,  390,  391,  392,  393,  420
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*Elset, elset=_ALLCONT_S6, internal, instance=TargetPlate-10
  359,  360,  361,  389,  390,  391
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*Elset, elset=_ALLCONT_S6, internal, instance=TargetPlate-18
  329,  359,  360,  361,  389,  390
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*Elset, elset=_ALLCONT_S6, internal, instance=TargetPlate-14
  359,  360,  361,  389,  390,  391
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*Elset, elset=_ALLCONT_S6, internal, instance=TargetPlate-3
  360,  390,  391,  392,  393,  420
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*Elset, elset=_ALLCONT_S6, internal, instance=TargetPlate-5
  360,  390,  391,  392,  393,  420
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*Elset, elset=_ALLCONT_S6, internal, instance=TargetPlate-9
  359,  360,  361,  390,  391,  392
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*Elset, elset=_ALLCONT_S6, internal, instance=TargetPlate-17
  329,  359,  360,  361,  389,  390
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*Elset, elset=_ALLCONT_S6, internal, instance=TargetPlate-13
  359,  360,  361,  389,  390,  391
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*Elset, elset=_ALLCONT_S6, internal, instance=TargetPlate-7
  360,  390,  391,  392,  393,  420
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*Elset, elset=_ALLCONT_S6, internal, instance=TargetPlate-11
  359,  360,  361,  389,  390,  391
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*Elset, elset=_ALLCONT_S6, internal, instance=TargetPlate-19
  329,  359,  360,  361,  389,  390
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*Elset, elset=_ALLCONT_S6, internal, instance=TargetPlate-15
  359,  360,  361,  389,  390,  391
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*Surface, type=ELEMENT, name=ALLCONT
_ALLCONT_S1, S1
_ALLCONT_S2, S2
_ALLCONT_S4, S4
_ALLCONT_S6, S6
_ALLCONT_S3, S3
_ALLCONT_S5, S5
*End Assembly
**
** ELEMENT CONTROLS
**
*Section Controls, name=EC-1, ELEMENT DELETION=YES, MAX DEGRADATION=0.05
1., 1., 1.
*Section Controls, name=EC-2, ELEMENT DELETION=YES
1., 1., 1.
**
** MATERIALS
**
*Material, name=Dyneema_Chocron
*Damage Initiation, criterion=DUCTILE
 0.1, 0.333333,     0.01
*Damage Evolution, type=ENERGY, softening=EXPONENTIAL
1460.,
*Density
980.,
*Elastic
 7e+07, 0.45
*Plastic
 7e+06,0.
*Material, name=FIBERS_Fail
*Damage Initiation, criterion=DUCTILE
 0.03,   0., 0.01
*Damage Evolution, type=ENERGY
1.,
*Density
981.,
*Elastic
 2e+08, 0.3
*Plastic
 2.5e+09,0.
*Rate Dependent
1., 0.08
*Material, name=Fibers
*Density
981.,
*Elastic
 2e+08, 0.3
** Properties from Matweb: AISI Type M50 Tool Steel
*Material, name=M50_ToolSteel
*Damage Initiation, criterion=DUCTILE
 0.198, 0.33333,  0.0002
*Damage Evolution, type=ENERGY, softening=EXPONENTIAL
210000.,
*Density
7970.,
*Elastic
 2.034e+11, 0.3
*Plastic
 1.894e+09,0.
*Material, name=Matrix_Utomo
*Density
308.,
*Elastic, type=ENGINEERING CONSTANTS
 4.04e+10,  4.04e+10, 4.271e+09,      0.02,      0.06,      0.06,     9e+08,     4e+08
     4e+08,
**
** INTERACTION PROPERTIES
**
*Surface Interaction, name=Hazzard_Dyneema
*Cohesive Behavior
 6e+10, 3e+10, 3e+10
*Damage Initiation, criterion=MAXS
 1.2e+06, 1.8e+06, 1.8e+06
*Damage Evolution, type=ENERGY, mixed mode behavior=POWER LAW, power=2.
544.,1088.,1088.
*Surface Interaction, name=IntProp-1
*Friction
 0.42,
*Surface Interaction, name=Lassig_Dyneema
*Cohesive Behavior, eligibility=CURRENT CONTACTS
 3.62e+09, 3.07e+07, 3.07e+07
*Damage Initiation, criterion=MAXS
 1.07e+06, 1.01e+26, 1.01e+26
*Damage Evolution, type=ENERGY, mixed mode behavior=BK, power=2.5
790., 1.46, 1.46
*Damage Stabilization
0.002
**
** BOUNDARY CONDITIONS
**
** Name: BackFaceDisp Type: Displacement/Rotation
*Boundary
Clamp, 3, 3
** Name: SymmX Type: Symmetry/Antisymmetry/Encastre
*Boundary
SymmX, XSYMM
** Name: Symmy Type: Symmetry/Antisymmetry/Encastre
*Boundary
SymmY, YSYMM
**
** PREDEFINED FIELDS
**
** Name: ProjectileVel   Type: Velocity
*Initial Conditions, type=VELOCITY
SteelProjectile-1.All, 1, 0.
SteelProjectile-1.All, 2, 0.
SteelProjectile-1.All, 3, -291.
** ----------------------------------------------------------------
**
** STEP: Step-1
**
*Step, name=Step-1, nlgeom=YES
*Dynamic, Explicit
, 5e-05
*Bulk Viscosity
0.06, 1.2
**
** INTERACTIONS
**
** Interaction: GeneralContact
*Contact, op=NEW
*Contact Inclusions
ALLCONT ,
*Contact Property Assignment
 ,  , IntProp-1
TargetPlate-1.Front , TargetPlate-2.Back , Hazzard_Dyneema
TargetPlate-2.Front , TargetPlate-3.Back , Hazzard_Dyneema
TargetPlate-3.Front , TargetPlate-4.Back , Hazzard_Dyneema
TargetPlate-4.Front , TargetPlate-5.Back , Hazzard_Dyneema
TargetPlate-5.Front , TargetPlate-6.Back , Hazzard_Dyneema
TargetPlate-6.Front , TargetPlate-7.Back , Hazzard_Dyneema
TargetPlate-7.Front , TargetPlate-8.Back , Hazzard_Dyneema
TargetPlate-8.Front , TargetPlate-9.Back , Hazzard_Dyneema
TargetPlate-9.Front , TargetPlate-10.Back , Hazzard_Dyneema
TargetPlate-10.Front , TargetPlate-11.Back , Hazzard_Dyneema
TargetPlate-11.Front , TargetPlate-12.Back , Hazzard_Dyneema
TargetPlate-12.Front , TargetPlate-13.Back , Hazzard_Dyneema
TargetPlate-13.Front , TargetPlate-14.Back , Hazzard_Dyneema
TargetPlate-14.Front , TargetPlate-15.Back , Hazzard_Dyneema
TargetPlate-15.Front , TargetPlate-16.Back , Hazzard_Dyneema
TargetPlate-16.Front , TargetPlate-17.Back , Hazzard_Dyneema
TargetPlate-17.Front , TargetPlate-18.Back , Hazzard_Dyneema
TargetPlate-18.Front , TargetPlate-19.Back , Hazzard_Dyneema
TargetPlate-19.Front , TargetPlate-20.Back , Hazzard_Dyneema
**
** OUTPUT REQUESTS
**
*Restart, write, number interval=1, time marks=NO
**
** FIELD OUTPUT: F-Output-1
**
*Output, field, number interval=200
*Node Output
A, U, V
*Element Output, directions=YES
CFAILURE, DMICRT, ER, LE, MISES, PE, PEEQ, S, SDEG, SEQUT, STATUS
*Contact Output
CSTRESS,
**
** HISTORY OUTPUT: H-Output-1
**
*Output, history, variable=PRESELECT
*End Step
